// SBML level 3 version 2

model PBK_Cd_Human_Cui2026()
  // Cd PBK (Cui et al, 2026): Notes: Some changes in parameters needs to be set active when modeling factory dust and women
  // model units - substance: MicroGM, time: DAY, volume: L

  // Compartments:
  compartment Lung = 1 L;
  compartment GILumen = 1 L; GILumen is "GI Lumen";
  compartment ExtraTissueBlood = VETB; ExtraTissueBlood has L; ExtraTissueBlood is "Extra Tissue Blood";
  compartment LiverBlood = VLiverB; LiverBlood has L; LiverBlood is "liver blood";
  compartment LiverTissue = VLiverT; LiverTissue has L; LiverTissue is "liver tissue";
  compartment KidneyBlood = VKidneyB; KidneyBlood has L; KidneyBlood is "kidney blood";
  compartment KidneyTissue = VKidneyT; KidneyTissue has L; KidneyTissue is "Kidney tissue";
  compartment RestofBodyBlood = VRBB; RestofBodyBlood has L; RestofBodyBlood is "rest of body blood";
  compartment RestofBodyTissue = VRBT; RestofBodyTissue has L; RestofBodyTissue is "rest of body tissue";
  compartment Filtrate = 1 L; Filtrate is "filtrate compartment";
  compartment Urine = 1 L; Urine is "urine compartment";
  compartment Feces = 1 L; Feces is "feces compartment";

  // Species:
  substanceOnly species ALU in Lung = 0; ALU is "amount in lung";
  substanceOnly species AGILumen in GILumen = 0; AGILumen is "amount in gut lumen";
  substanceOnly species AETB_Free in ExtraTissueBlood = 0; AETB_Free is "free amount in extra tissue blood";
  substanceOnly species AETB_PP in ExtraTissueBlood = 0; AETB_PP is "Plasma protein bound amount in extra tissue blood";
  substanceOnly species AETB_RBC in ExtraTissueBlood = 0; AETB_RBC is "Red blood cell bound amount in extra tissue blood";
  substanceOnly species ALiverB_Free in LiverBlood = 0; ALiverB_Free is "free amount in liver blood";
  substanceOnly species ALiverB_PP in LiverBlood = 0; ALiverB_PP is "Plasma protein bound amount in liver blood";
  substanceOnly species ALiverB_RBC in LiverBlood = 0; ALiverB_RBC is "Red blood cell bound amount in liver blood";
  substanceOnly species ALiverT_Free in LiverTissue = 0; ALiverT_Free is "free amount in liver tissue";
  substanceOnly species ALiverT_MT in LiverTissue = 0; ALiverT_MT is "metallothionine bound amount in liver tissue";
  substanceOnly species AKidneyB_Free in KidneyBlood = 0; AKidneyB_Free is "free amount in kidney blood";
  substanceOnly species AKidneyB_PP in KidneyBlood = 0; AKidneyB_PP is "Plasma protein bound amount in kidney blood";
  substanceOnly species AKidneyB_RBC in KidneyBlood = 0; AKidneyB_RBC is "Red blood cell bound amount in kidney blood";
  substanceOnly species AKidneyT_Free in KidneyTissue = 0; AKidneyT_Free is "free amount in kidney tissue";
  substanceOnly species AKidneyT_MT in KidneyTissue = 0; AKidneyT_MT is "metallothionine bound amount in kidney tissue";
  substanceOnly species ARBB_Free in RestofBodyBlood = 0; ARBB_Free is "free amount in rest of body blood";
  substanceOnly species ARBB_PP in RestofBodyBlood = 0; ARBB_PP is "Plasma protein bound amount in rest of body blood";
  substanceOnly species ARBB_RBC in RestofBodyBlood = 0; ARBB_RBC is "Red blood cell bound amount in rest of body blood";
  substanceOnly species ARBT_Free in RestofBodyTissue = 0; ARBT_Free is "free amount in rest of body tissue";
  substanceOnly species AFiltrate_Free in Filtrate = 0; AFiltrate_Free is "free amount in filtrate";
  substanceOnly species AFiltrate_MT in Filtrate = 0; AFiltrate_MT is "metallothionine bound amount in filtrate";
  substanceOnly species AUrineFiltrate in Urine = 0; AUrineFiltrate is "amount urine from filtrate";
  substanceOnly species AUrineKidneyTissue in Urine = 0; AUrineKidneyTissue is "amount in urine from kidney tissue";
  substanceOnly species AFecesUnabsorbed in Feces = 0; AFecesUnabsorbed is "amount in feces from unabsorbed GI lumen fraction";
  substanceOnly species AFecesBile in Feces = 0; AFecesBile is "amount in feces from biliary excretion";
  substanceOnly species AFecesIT in Feces = 0; AFecesIT is "amount in feces from from intestine walls excreted";

  // Parameters:
  BWa = 88 KiloGM; BWa is "average bodyweight";
  BWl = 88 KiloGM; BWl is "age-dependent bodyweight";
  year = 35 YR; year is "Age";
  FVB = 0.067 UNITLESS; FVB is "Fractional total blood volume";
  VB has L; VB is "Total blood volume";
  Iwa = 1.8 KiloGM; Iwa is "Average adult liver weight";
  VL has L; VL is "Liver volume";
  FVLB = 0.11 UNITLESS; FVLB is "Fractional Liver Blood volume";
  VLiverB has L; VLiverB is "Liver Blood volume";
  VLiverT has L; VLiverT is "Liver Tissue volume";
  kwa = 0.31 KiloGM; kwa is "Average adult kidney weight";
  VK has L; VK is "Kidney volume";
  FVKB = 0.36 UNITLESS; FVKB is "Fractional kidney blood volume";
  VKidneyB has L; VKidneyB is "Kidney Blood volume";
  VKidneyT has L; VKidneyT is "Kidney Tissue volume";
  FVRBB = 0.02182 UNITLESS; FVRBB is "Fractional RB blood volume";
  A has L; A is "intermediate variable to calculate blood volume for rest of body";
  B has L; B is "intermediate variable to calculate volume for rest of body";
  VETB has L; VETB is "Extra-tissue blood volume";
  VRB has L; VRB is "Rest of body volume";
  VRBB has L; VRBB is "Rest of body blood volume";
  VRBT has L; VRBT is "Rest of body tissue volume";
  Lbm has KiloGM; Lbm is "lean body mass";
  tmp has GM_PER_DAY; tmp is "predicts daily creatinine excretion from lean body mass";
  UCER has GM_PER_DAY; UCER is "Urinary creatinine excretion rate";
  QCB has L_PER_DAY; QCB is "cardiac output rate";
  FQL = 0.25 UNITLESS; FQL is "fraction of blood flow to liver";
  QL has L_PER_DAY; QL is "blood flow rate to liver";
  FQK = 0.19 UNITLESS; FQK is "fraction of blood flow to kidney";
  QK has L_PER_DAY; QK is "blood flow rate to kidney";
  FQRB has UNITLESS; FQRB is "fraction of blood flow to restbody";
  QRB has L_PER_DAY; QRB is "blood flow rate to restbody";
  C1 = 0.1 UNITLESS; C1 is "Fraction of inhaled Cd that is deposited in nasopharyngeal and tracheobronchial regions but ending up being orally ingested";
  C5 = 0.05 UNITLESS; C5 is "Fraction of Cd in GI tract to be absorbed";
  Fraction_of_Cd_absorbed_as_CdMT = 0.25 UNITLESS;
  C3 = 0.05 PER_DAY; C3 is "Rate constant of absorption of Cd in Lung to ETB";
  C4 = 0.005 PER_DAY; C4 is "Rate constant of transfer of Cd in Lung to GI-tract";
  C6 = 0.05 PER_DAY; C6 is "Rate constant of absorption of Cd in Intestine lumen to Liver Blood";
  Maximum_CdMT_absorption_rate = 1 PER_DAY;
  k5 = 20 PER_DAY; k5 is "Rate constant of dissociation of plasma protein-bound Cd (CdPP) into Free Cd and PP";
  k6 = 80 PER_DAY; k6 is "Rate constant of association of Free Cd and PP to form CdPP";
  CX = 4 PER_DAY; CX is "Rate constant of sequestration of Free Cd into RBC";
  Rate_constant_of_CdRBC_turnover = 0.012 PER_DAY;
  f9 = 5e-7 UNITLESS; f9 is "Coefficient of CdMT efflux from Liver Tissue to Liver Blood relative to Liver Blood flow";
  f10 = 1.98e-8 UNITLESS; f10 is "Coefficient of Free Cd efflux from Liver Tissue to Liver Blood relative to Liver Blood flow";
  f11 = 0.65 UNITLESS; f11 is "Coefficient of Free Cd influx from Liver Blood to Liver Tissue relative to Liver Blood flow";
  C14 has L_PER_DAY; C14 is "Rate constant of CdMT efflux from Liver Tissue to Liver Blood";
  C13 has L_PER_DAY; C13 is "Rate constant of Free Cd efflux from Liver Tissue to Liver Blood";
  C12 has L_PER_DAY; C12 is "Rate constant of Free Cd influx from Liver Blood to Liver Tissue";
  k12 = 20 PER_DAY; k12 is "Rate constant of dissociation of CdMT into Free Cd and MT in Liver Tissue";
  k13 = 667 PER_DAY; k13 is "Rate constant of association of Free Cd and MT to form CdMT in Liver Tissue";
  C15 = 0.00165 PER_DAY; C15 is "Rate constant of Free Cd excretion from Liver Tissue to feces via bile";
  f15 = 0.023 UNITLESS; f15 is "Coefficient of CdMT filtration from Kidney Blood to Filtrate relative to Kidney Blood flow";
  f16 = 0.099 UNITLESS; f16 is "Coefficient of Free Cd filtration from Kidney Blood to Filtrate relative to Kidney Blood flow";
  k15 has L_PER_DAY; k15 is "Rate constant of CdMT filtration from Kidney Blood to Filtrate";
  k16 has L_PER_DAY; k16 is "Rate constant of Free Cd filtration from Kidney Blood to Filtrate";
  C17x = 0.95 PER_DAY; C17x is "Age-dependent rate constant of CdMT reabsorption from Filtrate to Kidney Tissue";
  C17 has PER_DAY; C17 is "Rate constant of CdMT reabsorption from Filtrate to Kidney Tissue for age <= 30";
  k18 = 1 PER_DAY; k18 is "Rate constant of Free Cd excretion from Filtrate to urine";
  C21 = 7.7e-7; C21 is "Coefficient of increase of rate constant of Free Cd and CdMT excretion from Kidney Tissue to urine for age >30 (unit in /d y)";
  C19x = 9.8e-5 PER_DAY; C19x is "Age-dependent rate constant of Free Cd and CdMT excretion from Kidney Tissue to urine";
  C19 has PER_DAY; C19 is "Rate constant of Free Cd and CdMT excretion from Kidney Tissue to urine for age <= 30";
  k20 = 20 PER_DAY; k20 is "Rate constant of dissociation of CdMT in Kidney Tissue into Free Cd and MT in Kidney Tissue";
  k21 = 11.11 PER_DAY; k21 is "Rate constant of association of Free Cd and MT to form CdMT in Kidney Tissue";
  f22 = 4e-9 UNITLESS; f22 is "Coefficient of Free Cd efflux from Kidney Tissue to Kidney Blood relative to Kidney Blood flow";
  C18 has L_PER_DAY; C18 is "Rate constant of Free Cd efflux from Kidney Tissue to Kidney Blood";
  f23 = 2e-5 UNITLESS; f23 is "Coefficient of Free Cd efflux from RB Tissue to RB Blood relative to RB Blood flow";
  f24 = 1 UNITLESS; f24 is "Coefficient of Free Cd influx from RB Blood to RB Tissue relative to RB Blood flow";
  C10 has L_PER_DAY; C10 is "Rate constant of Free Cd efflux from RB Tissue to RB Blood";
  C9 has L_PER_DAY; C9 is "Rate constant of Free Cd influx from RB Blood to RB Tissue";
  C11 = 0.0001 PER_DAY; C11 is "Rate constant of Cd excretion from RB Tissue to feces representing fecal Cd sourced from intestine excretion and intestine wall sloughing";
  PP = 1 UNITLESS; PP is "Free plasma protein";
  RBC = 1 UNITLESS; RBC is "Free red blood cells";
  MTL = 1 UNITLESS; MTL is "Free Metallothionine in Liver Tissue";
  MTK = 1 UNITLESS; MTK is "Free Metallothionine in Kidney Tissue";
  CABlood_Free has MicroGM_PER_L; CABlood_Free is "unbound concentration in arterial blood";
  CABlood_PP has MicroGM_PER_L; CABlood_PP is "plasma protein bound concentration in arterial blood";
  CABlood_RBC has MicroGM_PER_L; CABlood_RBC is "red blood cell bound concentration in arterial blood";
  CVLiverB_Free has MicroGM_PER_L; CVLiverB_Free is "unbound concentration in liver venouse blood";
  CVLiverB_PP has MicroGM_PER_L; CVLiverB_PP is "protein plasma bound concentration in liver venouse blood";
  CVLiverB_RBC has MicroGM_PER_L; CVLiverB_RBC is "red blood cell bound concentration in liver venouse blood";
  CLiverT_Free has MicroGM_PER_L; CLiverT_Free is "unbound concentration in liver tissue";
  CLiverT_MT has MicroGM_PER_L; CLiverT_MT is "metallothionine bound concentration in liver tissue";
  CVKidneyB_Free has MicroGM_PER_L; CVKidneyB_Free is "unbound concentration in kidney venouse blood";
  CVKidneyB_PP has MicroGM_PER_L; CVKidneyB_PP is "protein plasma bound concentration in kidney venouse blood";
  CVKidneyB_RBC has MicroGM_PER_L; CVKidneyB_RBC is "red blood cell bound concentration in kidney venouse blood";
  CKidneyT_Free has MicroGM_PER_L; CKidneyT_Free is "unbound concentration in kidney tissue";
  CKidneyT_MT has MicroGM_PER_L; CKidneyT_MT is "metallothionine bound concentration in kidney tissue";
  CVRBB_Free has MicroGM_PER_L; CVRBB_Free is "unbound concentration in rest of body venouse blood";
  CVRBB_PP has MicroGM_PER_L; CVRBB_PP is "protein plasma bound concentration in rest of body venouse blood";
  CVRBB_RBC has MicroGM_PER_L; CVRBB_RBC is "red blood cell bound concentration in rest of body venouse blood";
  CRBT_Free has MicroGM_PER_L; CRBT_Free is "unbound concentration in rest of body tissue";
  uptakeTotal_Lung has MicroGM_PER_DAY; uptakeTotal_Lung is "total daily amount in Lung";
  uptake1_Lung has MicroGM_PER_DAY; uptake1_Lung is "fraction of total daily amount in Lung to protein plasma bound amount in extra tissue blood";
  uptakeTotal_GI has MicroGM_PER_DAY; uptakeTotal_GI is "total daily amount in GI tract";
  uptake2_Lung has MicroGM_PER_DAY; uptake2_Lung is "fraction of total daily amount in Lung to free amount in extra tissue blood";
  uptake1_GI has MicroGM_PER_DAY; uptake1_GI is "fraction of total daily amount in GI tract to protein plasma bound amount in liver blood";
  uptake2_GI has MicroGM_PER_DAY; uptake2_GI is "fraction of total daily amount in GI tract to free amount in liver blood";

  // Assignment rules:
  VB := FVB*BWl;
  VL := Iwa*(BWl/BWa)^0.85;
  VLiverB := FVLB*VL;
  VLiverT := (1 - FVLB)*VL;
  VK := kwa*(BWl/BWa)^0.84;
  VKidneyB := FVKB*VK;
  VKidneyT := (1 - FVKB)*VK;
  A := VB - VLiverB - VKidneyB;
  B := BWl - VL - VK;
  VETB := (A - FVRBB*B)/(1 - FVRBB);
  VRB := B - VETB;
  VRBB := FVRBB*VRB;
  VRBT := (1 - FVRBB)*VRB;
  Lbm := 0.88*BWl;
  tmp := (Lbm - 8.58)/0.0272/1000;
  UCER := piecewise(0.5, tmp < 0.5, tmp);
  QCB := 15*BWl^0.74*24;
  QL := FQL*QCB;
  QK := FQK*QCB;
  FQRB := 1 - FQL - FQK;
  QRB := FQRB*QCB;
  C14 := f9*QL;
  C13 := f10*QL;
  C12 := f11*QL;
  k15 := f15*QK;
  k16 := f16*QK;
  C17 := piecewise(C17x - C17x/3*(year - 30)/50, year > 30, C17x);
  C19 := piecewise(C19x + C21*(year - 30), year > 30, C19x);
  C18 := f22*QK;
  C10 := f23*QRB;
  C9 := f24*QRB;
  CABlood_Free := AETB_Free/VETB;
  CABlood_PP := AETB_PP/VETB;
  CABlood_RBC := AETB_RBC/VETB;
  CVLiverB_Free := ALiverB_Free/VLiverB;
  CVLiverB_PP := ALiverB_PP/VLiverB;
  CVLiverB_RBC := ALiverB_RBC/VLiverB;
  CLiverT_Free := ALiverT_Free/VLiverT;
  CLiverT_MT := ALiverT_MT/VLiverT;
  CVKidneyB_Free := AKidneyB_Free/VKidneyB;
  CVKidneyB_PP := AKidneyB_PP/VKidneyB;
  CVKidneyB_RBC := AKidneyB_RBC/VKidneyB;
  CKidneyT_Free := AKidneyT_Free/VKidneyT;
  CKidneyT_MT := AKidneyT_MT/VKidneyT;
  CVRBB_Free := ARBB_Free/VRBB;
  CVRBB_PP := ARBB_PP/VRBB;
  CVRBB_RBC := ARBB_RBC/VRBB;
  CRBT_Free := ARBT_Free/VRBT;
  uptakeTotal_Lung := C3*ALU;
  uptake1_Lung := piecewise(0, uptakeTotal_Lung + uptakeTotal_GI <= 0, Maximum_CdMT_absorption_rate*uptakeTotal_Lung/(uptakeTotal_Lung + uptakeTotal_GI), Fraction_of_Cd_absorbed_as_CdMT*(uptakeTotal_Lung + uptakeTotal_GI) > Maximum_CdMT_absorption_rate, Fraction_of_Cd_absorbed_as_CdMT*uptakeTotal_Lung);
  uptakeTotal_GI := C6*AGILumen;
  uptake2_Lung := uptakeTotal_Lung - uptake1_Lung;
  uptake1_GI := piecewise(0, uptakeTotal_Lung + uptakeTotal_GI <= 0, Maximum_CdMT_absorption_rate*uptakeTotal_GI/(uptakeTotal_Lung + uptakeTotal_GI), Fraction_of_Cd_absorbed_as_CdMT*(uptakeTotal_Lung + uptakeTotal_GI) > Maximum_CdMT_absorption_rate, Fraction_of_Cd_absorbed_as_CdMT*uptakeTotal_GI);
  uptake2_GI := uptakeTotal_GI - uptake1_GI;

  // Reactions:
  _J0: ALU -> AGILumen; C4*ALU;
  _J1: ALU -> AETB_Free; uptake2_Lung;
  _J2: ALU -> AETB_PP; uptake1_Lung;
  _J3: AGILumen -> ALiverB_Free; uptake2_GI;
  _J4: AGILumen -> ALiverB_PP; uptake1_GI;
  _J5: AETB_Free -> ALiverB_Free; QL*CABlood_Free;
  _J6: AETB_PP -> ALiverB_PP; QL*CABlood_PP;
  _J7: AETB_RBC -> ALiverB_RBC; QL*CABlood_RBC;
  _J8: AETB_Free -> AKidneyB_Free; QK*CABlood_Free;
  _J9: AETB_PP -> AKidneyB_PP; QK*CABlood_PP;
  _J10: AETB_RBC -> AKidneyB_RBC; QK*CABlood_RBC;
  _J11: AETB_Free -> ARBB_Free; QRB*CABlood_Free;
  _J12: AETB_PP -> ARBB_PP; QRB*CABlood_PP;
  _J13: AETB_RBC -> ARBB_RBC; QRB*CABlood_RBC;
  _J14: AETB_PP -> AETB_Free; k5*AETB_PP;
  _J15: AETB_Free -> AETB_PP; k6*AETB_Free*PP;
  _J16: AETB_RBC -> AETB_Free; Rate_constant_of_CdRBC_turnover*AETB_RBC;
  _J17: AETB_Free -> AETB_RBC; CX*AETB_Free*RBC;
  _J18: ALiverB_Free -> AETB_Free; QL*CVLiverB_Free;
  _J19: ALiverB_Free -> ALiverB_PP; k6*ALiverB_Free*PP;
  _J20: ALiverB_Free -> ALiverB_RBC; CX*ALiverB_Free*RBC;
  _J21: ALiverB_PP -> AETB_PP; QL*CVLiverB_PP;
  _J22: ALiverB_PP -> ALiverB_Free; k5*ALiverB_PP;
  _J23: ALiverB_RBC -> AETB_RBC; QL*CVLiverB_RBC;
  _J24: ALiverB_RBC -> ALiverB_Free; Rate_constant_of_CdRBC_turnover*ALiverB_RBC;
  _J25: ALiverT_Free -> ALiverB_Free; C13*CLiverT_Free;
  _J26: ALiverB_Free -> ALiverT_Free; C12*CVLiverB_Free;
  _J27: ALiverT_MT -> ALiverT_Free; k12*ALiverT_MT;
  _J28: ALiverT_Free -> ALiverT_MT; k13*ALiverT_Free*MTL;
  _J29: ALiverT_MT -> ALiverB_PP; C14*CLiverT_MT;
  _J30: AKidneyB_Free -> AETB_Free; QK*CVKidneyB_Free;
  _J31: AKidneyB_Free -> AKidneyB_PP; k6*AKidneyB_Free*PP;
  _J32: AKidneyB_Free -> AKidneyB_RBC; CX*AKidneyB_Free*RBC;
  _J33: AKidneyB_PP -> AETB_PP; QK*CVKidneyB_PP;
  _J34: AKidneyB_PP -> AKidneyB_Free; k5*AKidneyB_PP;
  _J35: AKidneyB_RBC -> AETB_RBC; QK*CVKidneyB_RBC;
  _J36: AKidneyB_RBC -> AKidneyB_Free; Rate_constant_of_CdRBC_turnover*AKidneyB_RBC;
  _J37: AKidneyT_MT -> AKidneyT_Free; k20*AKidneyT_MT;
  _J38: AKidneyT_Free -> AKidneyT_MT; k21*AKidneyT_Free*MTK;
  _J39: AKidneyT_Free -> AKidneyB_Free; C18*CKidneyT_Free;
  _J40: AFiltrate_MT -> AKidneyT_MT; C17*AFiltrate_MT;
  _J41: ARBB_Free -> AETB_Free; QRB*CVRBB_Free;
  _J42: ARBB_Free -> ARBB_PP; k6*ARBB_Free*PP;
  _J43: ARBB_Free -> ARBB_RBC; CX*ARBB_Free*RBC;
  _J44: ARBB_PP -> AETB_PP; QRB*CVRBB_PP;
  _J45: ARBB_PP -> ARBB_Free; k5*ARBB_PP;
  _J46: ARBB_RBC -> AETB_RBC; QRB*CVRBB_RBC;
  _J47: ARBB_RBC -> ARBB_Free; Rate_constant_of_CdRBC_turnover*ARBB_RBC;
  _J48: ARBT_Free -> ARBB_Free; C10*CRBT_Free;
  _J49: ARBB_Free -> ARBT_Free; C9*CVRBB_Free;
  _J50: AKidneyB_Free -> AFiltrate_Free; k16*CVKidneyB_Free;
  _J51: AKidneyB_PP -> AFiltrate_MT; k15*CVKidneyB_PP;
  _J52: AFiltrate_Free -> AUrineFiltrate; k18*AFiltrate_Free;
  _J53: AFiltrate_MT -> AUrineFiltrate; (1 - C17)*AFiltrate_MT;
  _J54: AKidneyT_Free -> AUrineKidneyTissue; C19*AKidneyT_Free;
  _J55: AKidneyT_MT -> AUrineKidneyTissue; C19*AKidneyT_MT;
  _J56: ALiverT_Free -> AFecesBile; C15*ALiverT_Free;
  _J57: ARBT_Free -> AFecesIT; C11*ARBT_Free;

  // Unit definitions:
  unit MicroGM = 1e-6 gram;
  unit DAY = 86400 second;
  unit L = litre;
  unit KiloGM = 1000 gram;
  unit YR = 3.15576e7 second;
  unit UNITLESS = dimensionless;
  unit GM_PER_DAY = gram / (86400 second);
  unit L_PER_DAY = litre / (86400 second);
  unit PER_DAY = 1 / (86400 second);
  unit MicroGM_PER_L = 1e-6 gram / litre;
  unit MicroGM_PER_DAY = 1e-6 gram / (86400 second);
end
