// SBML level 3 version 2

function f_BW_male(Age, BW_birth)
  piecewise(76, Age > 79, BW_birth + 0.7518199*Age*12 - 0.02023793*(Age*12)^2 + 0.0002921682*(Age*12)^3 - 2.06762e-6*(Age*12)^4 + 8.469e-9*(Age*12)^5 - 2.188427e-11*(Age*12)^6 + 3.699776e-14*(Age*12)^7 - 4.099077e-17*(Age*12)^8 + 2.874804e-20*(Age*12)^9 - 1.159732e-23*(Age*12)^10 + 2.052602e-27*(Age*12)^11);
end

function f_BW_female(Age, BW_birth)
  piecewise(68, Age > 79, BW_birth + 0.6866462*Age*12 - 0.01949911*(Age*12)^2 + 0.00031311*(Age*12)^3 - 2.466654e-6*(Age*12)^4 + 1.113217e-8*(Age*12)^5 - 3.131402e-11*(Age*12)^6 + 5.693737e-14*(Age*12)^7 - 6.706947e-17*(Age*12)^8 + 4.947858e-20*(Age*12)^9 - 2.079251e-23*(Age*12)^10 + 3.800367e-27*(Age*12)^11);
end

function f_BW(Age, Sex, BW_birth)
  piecewise(f_BW_male(Age, BW_birth), Sex == 1, f_BW_female(Age, BW_birth));
end

function f_Metallothionein_Kidney(Age, K_Metallothionein_Kidney_U30)
  piecewise(K_Metallothionein_Kidney_U30, Age < 30, K_Metallothionein_Kidney_U30 - K_Metallothionein_Kidney_U30/3*(Age - 30)/50);
end

function f_Kidney_Urine(Age, K_Kidney_Urine_U30, Increase_Cd_Urine)
  piecewise(K_Kidney_Urine_U30, Age < 30, K_Kidney_Urine_U30 + Increase_Cd_Urine*(Age - 30));
end

function f_HCT(Age, HCT_infant, HCT_adult)
  piecewise(HCT_infant, Age <= 2, piecewise(1.12815e-6*Age^3 - 0.000172362*Age^2 + 0.00815264*Age + 0.327363, Age < 18, HCT_adult));
end

function f_VLiverc(Age, Sex)
  piecewise(piecewise(0.0247 + (0.0409 - 0.0247)*exp(-0.218*Age), Age <= 79, 0.0247 + 5.371498e-10), Sex == 1, piecewise(0.0233 + (0.038 - 0.0233)*exp(-0.122*Age), Age <= 79, 0.0233 + 9.58489e-7));
end

function f_VKidneyc(Age, Sex)
  piecewise(piecewise(0.0042 + (0.00767 - 0.0042)*exp(-0.206*Age), Age <= 79, 0.0042 + 2.969074e-10), Sex == 1, piecewise(0.0046 + (0.00709 - 0.0046)*exp(-0.221*Age), Age <= 79, 0.0046 + 6.514063e-11));
end

function f_VBloodc(Age, Sex)
  piecewise(piecewise(-0.027*Age + 0.077, Age < 1, 0.0761/(1 + exp(-0.683*Age + 0.946))), Sex == 1, piecewise(-0.0273*Age + 0.0771, Age < 1, piecewise(3.28e-5*Age^3 - 0.00121*Age^2 + 0.0124*Age + 0.0386, Age < 14.019723, 0.065)));
end

model Cd_lifetime_Gastellu()
  // hasTaxon taxonomy:40674
  // model units - substance: MicroGM, time: DAY, volume: L, extent: MicroGM

  // Compartments:
  compartment Metallothionein; Metallothionein has L; Metallothionein is "metallothionein";
  compartment Liver; Liver has L; Liver is "liver";
  compartment Kidney; Kidney has L; Kidney is "kidney";
  compartment Feces; Feces has L; Feces is "feces";
  compartment Urine; Urine has L; Urine is "urine";
  compartment Gut; Gut has L; Gut is "gut";
  compartment Lung; Lung has L; Lung is "lung";
  compartment Plasma; Plasma has L; Plasma is "blood plasma";
  compartment RBC; RBC has L; RBC is "red blood cells";
  compartment Others; Others has L; Others is "Rest of the body";

  // Species:
  substanceOnly species AGut in Gut = 0; AGut is "amount of chemical in gut";
  substanceOnly species ALiver in Liver = 0; ALiver is "amount of chemical in liver";
  substanceOnly species AKidney in Kidney = 0; AKidney is "amount of chemical in kidney";
  substanceOnly species ALung in Lung = 0; ALung is "Amount in lungs";
  substanceOnly species AUrine in Urine = 0; AUrine is "Amount in urine";
  substanceOnly species AFeces in Feces = 0; AFeces is "Amount in feces";
  substanceOnly species APlasma in Plasma = 0; APlasma is "amount of chemical in plasma";
  substanceOnly species ARBC in RBC = 0; ARBC is "Amount in red blood cells";
  substanceOnly species AMetallothionein in Metallothionein = 0; AMetallothionein is "Amount in metallothionein";
  substanceOnly species AOthers in Others = 0; AOthers is "Rest of the body";

  // Parameters:
  Age = 18 YR; Age is "age";
  Sex = 1 UNITLESS; Sex is "sex (1=male, 2=female)";
  BW has KiloGM; BW is "body weight";
  deltaBW has UNITLESS; deltaBW is "Variability on bodyweight";
  BWBirth = 3.938425 KiloGM; BWBirth is "body weight at birth";
  AgeRef = 0 YR; AgeRef is "current age of reference indvididual in simulation";
  BWRef = 3.938425 KiloGM; BWRef is "body weight of reference indvididual in simulation";
  VBloodc has L_PER_KiloGM; VBloodc is "Volume of blood as fraction of bodyweight";
  HCT_infant = 0.359 UNITLESS; HCT_infant is "Hematocrit at infant age (<=2 years)";
  HCT_adult = 0.4248446 UNITLESS; HCT_adult is "Hematocrit at adult age (>=18 years)";
  HCT = 0.425 UNITLESS; HCT is "Hematocrit";
  VLiverc has L_PER_KiloGM; VLiverc is "Volume of liver as fraction of bodyweight";
  VKidneyc has L_PER_KiloGM; VKidneyc is "Volume of kidney as fraction of bodyweight";
  VGutc has L_PER_KiloGM; VGutc is "Volume of gut as fraction of bodyweight";
  VLungc has L_PER_KiloGM; VLungc is "Volume of lung as fraction of bodyweight";
  VMetallothionein = 0.5 UNITLESS; VMetallothionein is "Volume of fraction of metallothionein in liver cytosol";
  VLiver has L; VLiver is "Volume of liver";
  VKidney has L; VKidney is "Volume of kidney";
  VFeces has L; VFeces is "Volume of feces";
  VUrine has L; VUrine is "Volume of urine";
  VGut has L; VGut is "Volume of gut";
  VLung has L; VLung is "Volume of lung";
  VBlood has L; VBlood is "Volume of blood";
  VPlasma has L; VPlasma is "Volume of blood plasma";
  VRBC has L; VRBC is "Volume of red blood cells";
  VOthers has L; VOthers is "Volume of rest of the body";
  Fabs = 0.048 UNITLESS; Fabs is "Fraction absorbed in intestine";
  Ka = 0.05 PER_DAY; Ka is "Transfer from intestine to total uptake";
  K_Inhalation_Uptake = 0.05 PER_DAY; K_Inhalation_Uptake is "Transfer from lung to total intake";
  K_Lung_Intestine = 0.005 PER_DAY; K_Lung_Intestine is "Rate of absorption from Lung to intestine";
  F_Uptake_Metallothionein = 0.25 UNITLESS; F_Uptake_Metallothionein is "Fraction of uptake pool transferred to metallothionein";
  Max_Metallothionein = 1 MicroGM_PER_DAY; Max_Metallothionein is "Maximal dose in metallothionein added daily";
  K_Plasma_Others = 0.44 PER_DAY; K_Plasma_Others is "Transfer from plasma to the rest of the body";
  K_Others_Plasma = 0.00014 PER_DAY; K_Others_Plasma is "Transfer from rest of the body to plasma";
  K_Plasma_Feces = 0.27 PER_DAY; K_Plasma_Feces is "Transfer from plasma to feces";
  K_Plasma_Liver = 0.25 PER_DAY; K_Plasma_Liver is "Transfer from plasma to liver";
  K_Liver_Plasma = 3e-5 PER_DAY; K_Liver_Plasma is "Transfer from liver to plasma";
  K_Liver_Metallothionein = 0.00016 PER_DAY; K_Liver_Metallothionein is "Transfer from liver to metallothionein";
  K_Liver_Feces = 5e-5 PER_DAY; K_Liver_Feces is "Transfer from liver to feces";
  K_RBC_Metallothionein = 0.012 PER_DAY; K_RBC_Metallothionein is "Transfer from reb blood cells to metallothionein";
  K_Kidney_Plasma = 1e-5 PER_DAY; K_Kidney_Plasma is "Transfer from kidney to plasma";
  Increase_Cd_Urine = 1.1e-6 PER_DAY; Increase_Cd_Urine is "Temporal factor increasing Cd elimination in urine";
  K_Plasma_RBC = 0.04 PER_DAY; K_Plasma_RBC is "Transfer from plasma to red blood cells";
  K_Metallothionein_Kidney_U30 = 0.95 PER_DAY; K_Metallothionein_Kidney_U30 is "Transfer from metallothionein to kidney (age < 30)";
  K_Metallothionein_Kidney has PER_DAY; K_Metallothionein_Kidney is "Transfer from metallothionein to kidney";
  K_Kidney_Urine_U30 = 0.00014 PER_DAY; K_Kidney_Urine_U30 is "Transfer from kidney to urine (age < 30)";
  K_Kidney_Urine has PER_DAY; K_Kidney_Urine is "Transfer from kidney to urine";
  Uptake has MicroGM_PER_DAY; Uptake is "Total (systemic) uptake";
  Uptake_Metallothionein has MicroGM_PER_DAY; Uptake_Metallothionein is "Transfer from total uptake to metallothionein";
  Gut_Plasma_NoLimit has MicroGM_PER_DAY; Gut_Plasma_NoLimit is "Transfer from gut to plasma with unsaturated metallothionein";
  Gut_Plasma_Limit has MicroGM_PER_DAY; Gut_Plasma_Limit is "Transfer from gut to plasma with saturated metallothionein";
  Gut_Plasma has MicroGM_PER_DAY; Gut_Plasma is "Transfer from gut to plasma";
  Lung_Plasma_NoLimit has MicroGM_PER_DAY; Lung_Plasma_NoLimit is "Transfer from lung to plasma with unsaturated metallothionein";
  Lung_Plasma_Limit has MicroGM_PER_DAY; Lung_Plasma_Limit is "Transfer from lung to plasma with saturated metallothionein";
  Lung_Plasma has MicroGM_PER_DAY; Lung_Plasma is "Transfer from lung to plasma";

  // Assignment rules:
  Metallothionein := VMetallothionein;
  Liver := VLiver;
  Kidney := VKidney;
  Feces := VFeces;
  Urine := VUrine;
  Gut := VGut;
  Lung := VLung;
  Plasma := VPlasma;
  RBC := VRBC;
  Others := VOthers;
  BW := deltaBW*f_BW(Age, Sex, BWBirth);
  deltaBW := BWRef/f_BW(AgeRef, Sex, BWBirth);
  VBloodc := f_VBloodc(Age, Sex);
  VLiverc := f_VLiverc(Age, Sex);
  VKidneyc := f_VKidneyc(Age, Sex);
  VGutc := piecewise(0.0021, Sex == 1, 0.0023);
  VLungc := piecewise(0.0068, Sex == 1, 0.007);
  VLiver := VLiverc*BW;
  VKidney := VKidneyc*BW;
  VFeces := 1;
  VUrine := 1;
  VGut := VGutc*BW;
  VLung := VLungc*BW;
  VBlood := VBloodc*BW;
  VPlasma := VBlood*(1 - HCT);
  VRBC := VBlood*HCT;
  VOthers := BW*(1 - VLiverc - VKidneyc - VGutc - VLungc - VBloodc);
  K_Metallothionein_Kidney := f_Metallothionein_Kidney(Age, K_Metallothionein_Kidney_U30);
  K_Kidney_Urine := f_Kidney_Urine(Age, K_Kidney_Urine_U30, Increase_Cd_Urine);
  Uptake := AGut*Ka*Fabs + ALung*K_Inhalation_Uptake;
  Uptake_Metallothionein := F_Uptake_Metallothionein*Uptake;
  Gut_Plasma_NoLimit := (1 - F_Uptake_Metallothionein)*AGut*Ka*Fabs;
  Gut_Plasma_Limit := AGut*Ka*Fabs + ALung*K_Lung_Intestine*Fabs - Max_Metallothionein*(AGut*Ka*Fabs/Uptake);
  Gut_Plasma := piecewise(Gut_Plasma_NoLimit, Uptake_Metallothionein < Max_Metallothionein, Gut_Plasma_Limit);
  Lung_Plasma_NoLimit := (1 - F_Uptake_Metallothionein)*ALung*K_Inhalation_Uptake;
  Lung_Plasma_Limit := ALung*K_Inhalation_Uptake - Max_Metallothionein*(ALung*K_Inhalation_Uptake/Uptake);
  Lung_Plasma := piecewise(Lung_Plasma_NoLimit, Uptake_Metallothionein < Max_Metallothionein, Lung_Plasma_Limit);

  // Rate rules:
  Age' = 1/365;

  // Reactions:
  _J0: AGut -> APlasma; Gut_Plasma;
  _J1: AGut -> AMetallothionein; AGut*Ka*Fabs - Gut_Plasma;
  _J2: AGut -> AFeces; AGut*Ka*(1 - Fabs);
  _J3: ALung -> APlasma; Lung_Plasma;
  _J4: ALung -> AMetallothionein; ALung*K_Inhalation_Uptake - Lung_Plasma;
  _J5: ALung -> AGut; ALung*K_Lung_Intestine;
  _J6: APlasma -> AOthers; APlasma*K_Plasma_Others;
  _J7: APlasma -> ARBC; APlasma*K_Plasma_RBC;
  _J8: APlasma -> AFeces; APlasma*K_Plasma_Feces;
  _J9: APlasma -> ALiver; APlasma*K_Plasma_Liver;
  _J10: ARBC -> AMetallothionein; ARBC*K_RBC_Metallothionein;
  _J11: AMetallothionein -> AKidney; AMetallothionein*K_Metallothionein_Kidney;
  _J12: AMetallothionein -> AUrine; AMetallothionein*(1 - K_Metallothionein_Kidney);
  _J13: ALiver -> APlasma; ALiver*K_Liver_Plasma;
  _J14: ALiver -> AMetallothionein; ALiver*K_Liver_Metallothionein;
  _J15: ALiver -> AFeces; ALiver*K_Liver_Feces;
  _J16: AKidney -> APlasma; AKidney*K_Kidney_Plasma;
  _J17: AKidney -> AUrine; AKidney*K_Kidney_Urine;
  _J18: AOthers -> APlasma; AOthers*K_Others_Plasma;

  // Unit definitions:
  unit MicroGM = 1e-6 gram;
  unit DAY = 86400 second;
  unit L = litre;
  unit YR = 3.15576e7 second;
  unit KiloGM = 1000 gram;
  unit UNITLESS = dimensionless;
  unit PER_DAY = 1 / (86400 second);
  unit MicroGM_PER_DAY = 1e-6 gram / (86400 second);
  unit L_PER_KiloGM = litre / (1000 gram);
end
