// SBML level 3 version 2

function BW_male_lifetime(mval)
  3.938425 + 0.7518199*mval - 0.02023793*mval^2 + 0.0002921682*mval^3 - 2.06762e-6*mval^4 + 8.469e-9*mval^5 - 2.188427e-11*mval^6 + 3.699776e-14*mval^7 - 4.099077e-17*mval^8 + 2.874804e-20*mval^9 - 1.159732e-23*mval^10 + 2.052602e-27*mval^11;
end

function BW_female_lifetime(mval)
  3.932403 + 0.6866462*mval - 0.01949911*mval^2 + 0.00031311*mval^3 - 2.466654e-6*mval^4 + 1.113217e-8*mval^5 - 3.131402e-11*mval^6 + 5.693737e-14*mval^7 - 6.706947e-17*mval^8 + 4.947858e-20*mval^9 - 2.079251e-23*mval^10 + 3.800367e-27*mval^11;
end

model Cd_mod_v3()
  // model units - substance: MicroGM, time: DAY, volume: L, extent: MicroGM

  // Compartments:
  compartment LungComp; LungComp has L; LungComp is "lung compartment";
  compartment GUT_LUMENComp; GUT_LUMENComp has L; GUT_LUMENComp is "gut lumen compartment";
  compartment INTESTINE_TISSUEComp; INTESTINE_TISSUEComp has L; INTESTINE_TISSUEComp is "intestinal tissue compartment";
  compartment PlasmaComp; PlasmaComp has L; PlasmaComp is "plasma compartment";
  compartment RBCComp; RBCComp has L; RBCComp is "red blood cell compartment";
  compartment MTComp; MTComp has L; MTComp is "Metallothionein compartment";
  compartment LiverComp; LiverComp has L; LiverComp is "liver compartment";
  compartment KidneyComp; KidneyComp has L; KidneyComp is "kidney compartment";
  compartment OtherComp; OtherComp has L; OtherComp is "rest of body compartment";
  compartment FecesComp; FecesComp has L; FecesComp is "feces compartment";
  compartment UrineComp; UrineComp has L; UrineComp is "urine compartment";

  // Species:
  substanceOnly species LUNG in LungComp = 0; LUNG is "amount in lung";
  substanceOnly species GUT_LUMEN in GUT_LUMENComp = 0; GUT_LUMEN is "amount in lumen";
  substanceOnly species INTESTINE_TISSUE in INTESTINE_TISSUEComp = 0; INTESTINE_TISSUE is "amount in intestinal tissue";
  substanceOnly species PLASMA in PlasmaComp = 0; PLASMA is "amount in plasma";
  substanceOnly species RBC in RBCComp = Acord_total; RBC is "amount in red blood cells";
  substanceOnly species META in MTComp = 0; META is "amount in metallothionein";
  substanceOnly species LIVER in LiverComp = 0; LIVER is "amount in liver";
  substanceOnly species KIDNEY in KidneyComp = 0; KIDNEY is "amount in kidney";
  substanceOnly species OTHER in OtherComp = 0; OTHER is "amount in restbody";
  substanceOnly species FECES in FecesComp = 0; FECES is "cumulative amount in feces";
  substanceOnly species URINE in UrineComp = 0; URINE is "cumulative amount in urine";

  // Parameters:
  k3 = 0.05 PER_DAY; k3 is "First-order transfer rate constant from lung to total systemic uptake";
  k4 = 0.005 PER_DAY; k4 is "First-order transfer rate constant from lung to GI";
  kabs = 1 PER_DAY; kabs is "First-order rate constant (added explicitly for unit consistency)";
  k5_h = 0.05 UNITLESS; k5_h is "Fraction of absorbed Cd in gut transferred to intestine in males";
  k5_f = 0.1 UNITLESS; k5_f is "Fraction of absorbed Cd in gut transferred to intestine in females";
  k6 = 0.05 PER_DAY; k6 is "First-order transfer rate constant from intestine to total systemic uptake";
  k7 = 0.25 UNITLESS; k7 is "Fraction of total systemic Cd uptake to the metallothionein";
  k8 = 1 MicroGM_PER_DAY; k8 is "Maximum Cd flux into the metallothionein";
  k_MT_out = 1 PER_DAY; k_MT_out is "First-order turnover rate constant for MT-bound Cd (added explicitly for unit consistency)";
  k9 = 0.44 PER_DAY; k9 is "kinetic constant rate PLASMA -> OTHER tissues";
  k10 = 0.00014 PER_DAY; k10 is "kinetic constant rate OTHER tissues -> PLASMA";
  k11 = 0.27 PER_DAY; k11 is "kinetic constant rate PLASMA -> feces";
  k12 = 0.25 PER_DAY; k12 is "kinetic constant rate PLASMA -> liver";
  k13 = 3e-5 PER_DAY; k13 is "kinetic constant rate liver -> PLASMA";
  k14 = 0.00016 PER_DAY; k14 is "kinetic constant rate liver -> MT pool";
  k15 = 5e-5 PER_DAY; k15 is "kinetic constant rate liver -> feces";
  kx = 0.04 PER_DAY; kx is "kinetic constant rate PLASMA -> RBC";
  k16 = 0.012 PER_DAY; k16 is "kinetic constant rate RBC-> MT pool";
  k17 = 0.95 UNITLESS; k17 is "Fraction of MT-bound Cd removal to KIDNEY; remainder goes directly to urine.";
  k18 = 1e-5 PER_DAY; k18 is "kinetic constant rate KIDNEY -> PLASMA";
  k19 = 0.00014 PER_DAY; k19 is "urine elimination rate constant";
  k21 = 1.1e-6 PER_YR; k21 is "Age-dependent increase in kidney-to-urine elimination after age 30";
  k20 = 0.1 UNITLESS; k20 is "Fraction of PLASMA + META Cd amounts to calculated whole-blood Cd";
  sex = 2 UNITLESS; sex is "sex discrimination";
  Age = 30 YR; Age is "Age of the individual at start of simulation";
  AgeRef = 30 YR; AgeRef is "Reference age used for scaling of nominal body weight to reference body weight";
  BWRef = 85 KiloGM; BWRef is "Body weight of individual at reference age";
  Delta_BWs3 has UNITLESS; Delta_BWs3 is "Individual body-weight multiplier reached at reference age";
  Delta_creat = 1 UNITLESS; Delta_creat is "Individual multiplicative adjustment to predicted urine creatinine output";
  Ccord = 0 MicroGM_PER_DAY; Ccord is "Measured Cd concentration in cord whole blood used to initialize birth Cd amount";
  year has YR; year is "Age in years";
  Delta_BW has UNITLESS; Delta_BW is "Age-dependent body-weight multiplier (1 at birth; Delta_BWs3 from age 3)";
  BW_male has KiloGM; BW_male is "measured bodyweight for male participiant";
  BW_female has KiloGM; BW_female is "measured bodyweight for female participiant";
  wbw has KiloGM; wbw is "bodyweight for the selected sex and age";
  hct_mid has UNITLESS; hct_mid is "Predicted hematocrit in the age-dependent (ages 2–18 years)";
  hct has UNITLESS; hct is "age-specific hematocrit fraction";
  vb_male has L; vb_male is "Male whole-blood volume or mass calculated from body weight";
  vb_female has L; vb_female is "Female whole-blood volume or mass calculated from body weight";
  vb has L; vb is "whole blood volume";
  vp has L; vp is "volume of plasma";
  vrbc has L; vrbc is "volume of red blood cells";
  vk_male has L; vk_male is "Male kidney volume";
  vk_female has L; vk_female is "Female kidney volume";
  vk has L; vk is "volume of kidney";
  vlungs has L; vlungs is "volume of lung";
  vint_male has L; vint_male is "volume of male intestine";
  vint_female has L; vint_female is "volume of female intestine";
  vintestine has L; vintestine is "volume of intestine";
  vl_male has L; vl_male is "volume of male liver";
  vl_female has L; vl_female is "volume of female liver";
  vl has L; vl is "volume of liver";
  vother has L; vother is "volume of rest body";
  wbw_f has L; wbw_f is "Caculated body weight from organ volumes";
  Vtidal_male has L; Vtidal_male is "Age-dependent tidal breathing volume in males (L/breath)";
  Vtidal_female has L; Vtidal_female is "Age-dependent tidal breathing volume in females (L/breath)";
  Vtidal has L; Vtidal is "Tidal breathing volume (L/breath)";
  FqBreath has PER_MIN; FqBreath is "Age-dependent breathing frequency (breaths/min)";
  vds_male has L; vds_male is "Age-dependent respiratory dead-space volume in males (L/breath)";
  vds_female has L; vds_female is "Age-dependent respiratory dead-space volume in females (L/breath)";
  vds has L; vds is "Respiratory dead-space volume (L/breath)";
  VInhalation has L_PER_DAY; VInhalation is "Daily inhaled air volume";
  ucr_base has GM_PER_DAY; ucr_base is "Reference creatinine output before Delta_creat adjustment";
  ucr has GM_PER_DAY; ucr is "Age-dependent creatinine output after Delta_creat adjustment";
  Vurine has L_PER_DAY; Vurine is "predicted urine volume";
  k5_active has UNITLESS; k5_active is "sex-specific gut:intestine fraction";
  k19x has PER_DAY; k19x is "age-adjusted kidney:urine rate";
  k17_decline has UNITLESS; k17_decline is "age-related changes of k17";
  k17x has UNITLESS; k17x is "age-adjusted MT removal fraction to kidney";
  k17b has UNITLESS; k17b is "MT removal fraction to urine";
  wbw0 has KiloGM; wbw0 is "bodyweight at birth";
  vb0 has L; vb0 is "volume of whole blood at birth";
  Acord_total has MicroGM; Acord_total is "initial Cd amound from measured cord whole blood";
  uptakeTotal_Lung has MicroGM_PER_DAY; uptakeTotal_Lung is "Systemic Cd uptake flux from lung";
  uptakeTotal_GI has MicroGM_PER_DAY; uptakeTotal_GI is "Systemic Cd uptake flux from intestine";
  TOTAL_UPTAKE has MicroGM_PER_DAY; TOTAL_UPTAKE is "Sum of lung and GI systemic uptake fluxes";
  UPTAKE_MT has MicroGM_PER_DAY; UPTAKE_MT is "Remaining systemic Cd uptake flux to MT";
  UPTAKE_PLASMA has MicroGM_PER_DAY; UPTAKE_PLASMA is "Remaining systemic Cd uptake flux to plasma";
  uptakeMT_Lung has MicroGM_PER_DAY; uptakeMT_Lung is "Lung contribution to MT uptake flux, allocated in proportion to lung share of total uptake";
  uptakeMT_GI has MicroGM_PER_DAY; uptakeMT_GI is "GI contribution to MT uptake flux, allocated in proportion to GI share of total uptake";
  uptakePlasma_Lung has MicroGM_PER_DAY; uptakePlasma_Lung is "Lung contribution to plasma uptake flux";
  uptakePlasma_GI has MicroGM_PER_DAY; uptakePlasma_GI is "GI contribution to plasma uptake flux";
  BLOOD has MicroGM; BLOOD is "amount in whole blood";
  BLOOD_burden has MicroGM_PER_L; BLOOD_burden is "concentration in whole blood";
  kidney_burden has MicroGM_PER_L; kidney_burden is "concentration in kidney";
  ur has MicroGM_PER_DAY; ur is "urinary clearance rate";
  Conc_urine_cd has MicroGM_PER_L; Conc_urine_cd is "concentration in urine";
  ucdcr has MicroGM_PER_GM; ucdcr is "Urinary concentration normalized to creatinine (ug/g creatine)";
  total_internal has MicroGM; total_internal is "Total internal amount";
  Excreted has MicroGM; Excreted is "Total amount excreted";

  // Assignment rules:
  BWNominal := piecewise(BW_male_lifetime(AgeRef*12), sex == 1, BW_female_lifetime(AgeRef*12));
  Delta_BWs3 := BWRef/BWNominal;
  year := time/365 + Age;
  Delta_BW := piecewise(1 + (Delta_BWs3 - 1)*year*365/1095, year*365 <= 1095, Delta_BWs3);
  BW_male := piecewise(BW_male_lifetime(year*12)*Delta_BW, year <= 79, 76*Delta_BW);
  BW_female := piecewise(BW_female_lifetime(year*12)*Delta_BW, year <= 79, 68*Delta_BW);
  wbw := piecewise(BW_male, sex == 1, BW_female);
  hct_mid := 1.12815e-6*year^3 - 0.000172362*year^2 + 0.00815264*year + 0.327363;
  hct := piecewise(0.359, year <= 2, hct_mid, year < 18, 0.4248446);
  vb_male := piecewise((-0.027*year + 0.077)*wbw, year < 1, 0.0761/(1 + exp(-0.683*year + 0.946))*wbw);
  vb_female := piecewise((-0.0273*year + 0.0771)*wbw, year < 1, (3.28e-5*year^3 - 0.00121*year^2 + 0.0124*year + 0.0386)*wbw, year < 14.019723, 0.065*wbw);
  vb := piecewise(vb_male, sex == 1, vb_female);
  vp := (1 - hct)*vb;
  vrbc := hct*vb;
  vk_male := piecewise((0.0042 + (0.00767 - 0.0042)*exp(-0.206*year))*wbw, year <= 79, (0.0042 + 2.969074e-10)*wbw);
  vk_female := piecewise((0.0046 + (0.00709 - 0.0046)*exp(-0.221*year))*wbw, year <= 79, (0.0046 + 6.514063e-11)*wbw);
  vk := piecewise(vk_male, sex == 1, vk_female);
  vlungs := piecewise(0.0068*wbw, sex == 1, 0.007*wbw);
  vint_male := piecewise((-8.2562e-5*year^2 + 0.0013523*year + 0.01293)*wbw, year < 16, 0.014*wbw);
  vint_female := piecewise((-7.421e-5*year^2 + 0.001276*year + 0.01298)*wbw, year < 14.453301, 0.016*wbw);
  vintestine := piecewise(vint_male, sex == 1, vint_female);
  vl_male := piecewise((0.0247 + (0.0409 - 0.0247)*exp(-0.218*year))*wbw, year <= 79, (0.0247 + 5.371498e-10)*wbw);
  vl_female := piecewise((0.0233 + (0.038 - 0.0233)*exp(-0.122*year))*wbw, year <= 79, (0.0233 + 9.58489e-7)*wbw);
  vl := piecewise(vl_male, sex == 1, vl_female);
  vother := wbw - (vk + vb + vl + vintestine + vlungs);
  wbw_f := vk + vb + vl + vintestine + vlungs + vother;
  Vtidal_male := piecewise(0.0337*year + 0.0407, year < 21, 0.75);
  Vtidal_female := 0.46 + (0.0392 - 0.46)*exp(-0.127*year);
  Vtidal := piecewise(Vtidal_male, sex == 1, Vtidal_female);
  FqBreath := 12 + (38.9 - 12)*exp(-0.176*year);
  vds_male := piecewise(0.0076*year + 0.0101, year <= 18.4, 0.15);
  vds_female := 0.12 + (0.0107 - 0.12)*exp(-0.0986*year);
  vds := piecewise(vds_male, sex == 1, vds_female);
  VInhalation := FqBreath*(Vtidal - vds)*60*24;
  ucr_base := 0.032 + 0.02098*year + 0.009104*year^2 - 0.000455*year^3 + 7.578e-6*year^4 - 4.232e-8*year^5;
  ucr := piecewise(ucr_base*Delta_creat, year <= 70, 0.865756*Delta_creat);
  Vurine := 0.0294*wbw_f;
  k5_active := piecewise(k5_h, sex == 1, k5_f);
  k19x := piecewise(k19, year <= 30, k19 + k21*(year - 30));
  k17_decline := k17 - k17/3*(year - 30)/50;
  k17x := piecewise(k17, year <= 30, 0, k17_decline < 0, k17_decline);
  k17b := 1 - k17x;
  wbw0 := piecewise(3.938425, sex == 1, 3.932403);
  vb0 := piecewise(0.077*wbw0, sex == 1, 0.0771*wbw0);
  Acord_total := Ccord*vb0;
  uptakeTotal_Lung := k3*LUNG;
  uptakeTotal_GI := k6*INTESTINE_TISSUE;
  TOTAL_UPTAKE := uptakeTotal_Lung + uptakeTotal_GI;
  UPTAKE_MT_SMOOTH := 0.01*k8;
  UPTAKE_MT := k7*TOTAL_UPTAKE + (k8 - k7*TOTAL_UPTAKE)/(1 + exp((k8 - k7*TOTAL_UPTAKE)/UPTAKE_MT_SMOOTH));
  UPTAKE_PLASMA := TOTAL_UPTAKE - UPTAKE_MT;
  uptakeMT_Lung := piecewise(0, TOTAL_UPTAKE <= 0, UPTAKE_MT*uptakeTotal_Lung/TOTAL_UPTAKE);
  uptakeMT_GI := piecewise(0, TOTAL_UPTAKE <= 0, UPTAKE_MT*uptakeTotal_GI/TOTAL_UPTAKE);
  uptakePlasma_Lung := uptakeTotal_Lung - uptakeMT_Lung;
  uptakePlasma_GI := uptakeTotal_GI - uptakeMT_GI;
  BLOOD := RBC + k20*(PLASMA + META);
  BLOOD_burden := BLOOD/vb;
  kidney_burden := KIDNEY/vk;
  ur := k_MT_out*k17b*META + k19x*KIDNEY;
  Conc_urine_cd := ur/Vurine;
  ucdcr := ur/ucr;
  total_internal := GUT_LUMEN + INTESTINE_TISSUE + LUNG + RBC + META + LIVER + KIDNEY + OTHER + PLASMA;
  Excreted := FECES + URINE;

  // Reactions:
  _J0: LUNG -> GUT_LUMEN; k4*LUNG;
  _J1: LUNG -> META; uptakeMT_Lung;
  _J2: LUNG -> PLASMA; uptakePlasma_Lung;
  _J3: GUT_LUMEN -> INTESTINE_TISSUE; k5_active*kabs*GUT_LUMEN;
  _J4: GUT_LUMEN -> FECES; (1 - k5_active)*kabs*GUT_LUMEN;
  _J5: INTESTINE_TISSUE -> META; uptakeMT_GI;
  _J6: INTESTINE_TISSUE -> PLASMA; uptakePlasma_GI;
  _J7: PLASMA -> OTHER; k9*PLASMA;
  _J8: OTHER -> PLASMA; k10*OTHER;
  _J9: PLASMA -> FECES; k11*PLASMA;
  _J10: PLASMA -> LIVER; k12*PLASMA;
  _J11: LIVER -> PLASMA; k13*LIVER;
  _J12: LIVER -> META; k14*LIVER;
  _J13: LIVER -> FECES; k15*LIVER;
  _J14: PLASMA -> RBC; kx*PLASMA;
  _J15: RBC -> META; k16*RBC;
  _J16: META -> KIDNEY; k_MT_out*k17x*META;
  _J17: META -> URINE; k_MT_out*k17b*META;
  _J18: KIDNEY -> PLASMA; k18*KIDNEY;
  _J19: KIDNEY -> URINE; k19x*KIDNEY;

  // Unit definitions:
  unit MicroGM = 1e-6 gram;
  unit DAY = 86400 second;
  unit L = litre;
  unit PER_DAY = 1 / (86400 second);
  unit UNITLESS = dimensionless;
  unit MicroGM_PER_DAY = 1e-6 gram / (86400 second);
  unit PER_YR = 1 / (3.15576e7 second);
  unit YR = 3.15576e7 second;
  unit KiloGM = 1000 gram;
  unit PER_MIN = 1 / (60 second);
  unit L_PER_DAY = litre / (86400 second);
  unit GM_PER_DAY = gram / (86400 second);
  unit MicroGM_PER_L = 1e-6 gram / litre;
  unit MicroGM_PER_GM = 1e-6 gram / gram;
end
